ta := -25
vvv := 3
λal := 209
λst := 57
λp1 := 0.54
λp2 := 0.113
α := 6.23 + 2.23*vvv
aa := 1.325*10^-2
bb := 1.685*10^-2
d1 := 36.5*10^-3
ss := 2.5*10^-3
d2 := 67*10^-3
LLL := 1.11
l := 1.8*10^-3
δp := 0.5*10^-4
δ0x := 0.7*10^-3
δ2x := 0.3*10^-3
aem := 1.6605655*10^-27
k := 1.380662*10^-23
m1[1] := 1.00797
ααα := 1/3
Na := 6.022045*10^23
Tcr := 405.6
tcr := 405.6 - 273.15
pcr := 113*10^5
vcr := 4.255*10^-3
cal := 4.1868
λg := 5.13*cal*10^-3
Δ := 1*10^-4/(2*aa)
ReCr := 2320
Nn := 100
Ny := 100
Lot := 6.5
Luz1 := 2
Ntr := 50
ppα := 0
Luz2 := 5
Lpod := 10.5
Hcon := 1.99
Lcon := 4.26
DC1 := 0.146
DC2 := 0.159
i := 0 .. 5
ν1[i] := 0.146, 0.128, 0.118, 0.114, 0.098, 0.090
t[i] := -20, -10, 0, 10, 20, 30
p[i] := 20.06, 26.99, 35.54, 45.95, 58.46, 73.34
λ[i] := 0.13, 0.120, 0.110, 0.100, 0.080, 0.060
γ[i] := 1029.9, 980.8, 924.8, 858, 770.7, 596.4
γ1[i] := 51.4, 70.50, 96.30, 133, 190.20, 334.40
Cp[i] := 0.48, 0.547, 0.619, 0.700, 0.870, 1.56
r[i] := 67.79, 62.51, 56.13, 48.09, 37.10, 15.05
ν2[i] := 0.0526, 0.0461, 0.0425, 0.0410, 0.0353, 0.0326
σ[i] := 0.920, 0.815, 0.449, 0.276, 0.118, 0.040
a[i] := 2.63, 2.22, 1.72, 1.66, 1.19, 0.645
Pr[i] := 2.00, 2.08, 2.47, 2.47, 2.96, 5.05
ii := 0 .. 100
ttt[ii] := -20 + 20*ii/100
σc[i] := σ[i]*0.727*10^-3/0.0741
pc[i] := p[i]*10^4*9.81
vpx := cspline(t, pc)
px(tx) := interp(vpx, t, pc, tx)
rc[i] := r[i]*10^3*4.1868
vrx := cspline(t, rc)
λc[i] := λ[i]*10^3*4.1868/3600
rx(tx) := interp(vrx, t, rc, tx)
Cpc[i] := Cp[i]*10^3*4.1868
vλc := cspline(t, λc)
λx(tx) := interp(vλc, t, λc, tx)
λx(-10) = 0.13956
vcpx := cspline(t, Cpc)
νGc[i] := ν2[i]*10^-2/3600
Cpx(tx) := interp(vcpx, t, Cpc, tx)
λx(-10) = 0.13956
νLc[i] := ν1[i]*10^-6
vνG := cspline(t, νGc)
ac[i] := a[i]*10^-4/3600
νGx(tx) := interp(vνG, t, νGc, tx)
Prc[i] := Pr[i]
vνL := cspline(t, νLc)
νLx(tx) := interp(vνL, t, νLc, tx)
vax := cspline(t, ac)
vγL := cspline(t, γ)
ax(tx) := interp(vax, t, ac, tx)
γLx(tx) := interp(vγL, t, γ, tx)
vPr := cspline(t, Prc)
Prx(tx) := interp(vPr, t, Prc, tx)
vγG := cspline(t, γ)
γGx(tx) := interp(vγG, t, γ1, tx)
μGx(tx) := νGx(tx)*γGx(tx)
μLx(tx) := νLx(tx)*γLx(tx)
γGx(-10) = 70.5
dγL(tx) := d/dtx(γLx(tx))
Pry(tx) := νLx(tx)/ax(tx)
aax(tx) := λx(tx)/(γLx(tx)*Cpx(tx))
j := 0 .. 7
t1[j] := -50, -40, -30, -20, -10, 0, 10, 20
ρ[j] := 1156.34, 1117.77, 1076.76, 1032.39, 983.38, 926.99, 860.03, 772.57
Cp1[j] := 1.84*10^3, 1.88*10^3, 1.97*10^3, 2.05*10^3, 2.18*10^3, 2.47*10^3, 3.14*10^3, 5.00*10^3
ν1[j] := 1.19*10^-7, 1.18*10^-7, 1.17*10^-7, 1.15*10^-7, 1.13*10^-7, 1.08*10^-7, 1.01*10^-7, 9.1*10^-8
Pr1[j] := 2.96, 2.46, 2.22, 2.12, 2.20, 2.38, 2.80, 4.10
λ1[j] := 0.0855, 0.1011, 0.1116, 0.1151, 0.1099, 0.1045, 0.0971, 0.0872
vPr1 := cspline(t1, Pr1)
Prx1(tx) := interp(vPr1, t1, Pr1, tx)
vνL := cspline(t1, ν1)
νLx1(tx) := interp(vνL, t1, ν1, tx)
vCp1 := cspline(t1, Cp1)
Cpx1(tx) := interp(vCp1, t1, Cp1, tx)
vγL := cspline(t1, ρ)
γLx1(tx) := interp(vγL, t1, ρ, tx)
μLx1(tx) := νLx1(tx)*γLx1(tx)
vλ1 := cspline(t1, λ1)
λx1(tx) := interp(vλ1, t1, λ1, tx)
aax1(tx) := λx1(tx)/(Cpx1(tx)*γLx1(tx))
k := 0 .. 43
r[k] := 347.3, 342.7, 336.7, 330, 322.5, 314.2, 304.2, 293.7, 282.3, 270.5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
i2[k] := 141.1, 142.7, 145.8, 148.5, 150.5, 151.7, 151.6, 151.1, 149.9, 148.6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
v2[k] := 72.464, 63.291, 50.943, 48.103, 36.232, 30.581, 25.773, 21.787, 18.450, 15.723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
i1[k] := -206.2, -200, -190.9, -181.5, -172, -162.5, -152.6, -142.6, -132.4, -121.9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
v1[k] := 0.848, 0.857, 0.871, 0.885, 0.901, 0.918, 0.936, 0.956, 0.978, 1.002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
T3[k] := 216.55, 220, 225, 230, 235, 240, 245, 250, 255, 260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
p[k] := 5.18, 6, 7.34, 8.91, 10.75, 12.82, 15.18, 17.87, 20.85, 24.21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
s1[k] := 2.671, 2.702, 2.741, 2.780, 2.819, 2.859, 2.899, 2.939, 2.979, 3.019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
s2[k] := 4.275, 4.260, 4.237, 4.214, 4.191, 4.168, 4.141, 4.114, 4.086, 4.059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
t3[k] := T3[k] - 273.15
kk := 0 .. 28
Cp1[kk] := 2.47, 2.50, 2.53, 2.57, 2.61, 2.66, 2.71, 2.76, 2.82, 2.88, 2.95, 3.02, 3.10, 3.19, 3.28, 3.38, 3.50, 3.63, 3.77, 3.94, 4.14, 4.38, 4.65, 4.99, 5.42, 5.96, 6.67, 7.69, 9.20
Cp2[kk] := 1.61, 1.64, 1.68, 1.73, 1.78, 1.83, 1.88, 1.94, 2.01, 2.09, 2.17, 2.26, 2.35, 2.46, 2.58, 2.71, 2.88, 3.03, 3.23, 3.47, 3.75, 4.08, 4.48, 4.98, 5.60, 6.45, 7.57, 9.25, 11.72
T33[kk] := 273.15, 274, 275, 276, 277, 278, 279, 280, 281, 282, 283, 284, 285, 286, 287, 288, 289, 290, 291, 292, 293, 294, 295, 296, 297, 298, 299, 300, 301
t33[kk] := T33[kk] - 273.15
2.47/1.61 = 1.53416
jj := 0 .. 16
λλλ[jj] := 0.181, 0.174, 0.167, 0.16, 0.153, 0.146, 0.14, 0.133, 0.127, 0.12, 0.113, 0.107, 0.1, 0.095, 0.09, 0.086, 0.085
TTT[jj] := 220, 225, 230, 240, 245, 250, 255, 260, 265, 270, 275, 280, 285, 290, 295, 300
t4[jj] := TTT[jj] - 273.15
pc3[k] := p[k]*10^5
vc13[k] := v1[k]*10^-3
vc23[k] := v2[k]*10^-3
ic13[k] := i1[k]*10^3
ic23[k] := i2[k]*10^3
sc13[k] := s1[k]*10^3
sc23[k] := s2[k]*10^3
rc3[k] := r[k]*10^3
Cpc13[kk] := Cp1[kk]*10^3
Cpc23[kk] := Cp2[kk]*10^3
vp3 := cspline(t3, pc3)
px3(tx) := interp(vp3, t3, pc3, tx)
vr3 := cspline(t3, rc3)
rx3(tx) := interp(vr3, t3, rc3, tx)
vL3 := cspline(t3, vc13)
vLx3(tx) := interp(vL3, t3, vc13, tx)
λx2(tx) := interp(regress(t4, λλλ, 5), t4, λλλ, tx)
vG3 := cspline(t3, vc23)
vGx3(tx) := interp(vG3, t3, vc23, tx)
vCp13 := cspline(t33, Cpc13)
Cp1x3(tx) := interp(vCp13, t33, Cpc13, tx)
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λx2(-10) = 0.129454
vCp23 := cspline(t33, Cpc23)
Cp2x3(tx) := interp(vCp23, t33, Cpc23, tx)
vs13 := cspline(t3, sc13)
s1x3(tx) := interp(vs13, t3, sc13, tx)
Drx(tx) := d/dtx(rx(tx))
Drx3(tx) := d/dtx(rx3(tx))
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γLx2(tx) := vLx3(tx)^-1
vs23 := cspline(t3, sc23)
s2x3(tx) := interp(vs23, t3, sc23, tx)
γGx2(tx) := vGx3(tx)^-1
vi13 := cspline(t3, ic13)
i1x3(tx) := interp(vi13, t3, ic13, tx)
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vi23 := cspline(t3, ic23)
i2x3(tx) := interp(vi23, t3, ic23, tx)
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Cp1x3(10) = 2960.49
Cp2x3(-20) = -13751.7
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Cpx1(0)/Cp1x3(0) = 1
Lpod = 10.5
atm = 101325 kg/(m*s^2)
ii := 0 .. 6
at := 0.98*10^5
av[ii] := 13.4, 16.8, 19.4, 20.7, 23.4, 24.8, 26.3
ηv[ii] := 14.53, 16.15, 17.19, 17.69, 18.68, 19.16, 19.63
νv[ii] := 9.49, 11.97, 13.75, 14.66, 16.58, 17.57, 18.58
ρv[ii] := 1.532, 1.35, 1.251, 1.207, 1.127, 1.091, 1.057
λv[ii] := 2.05, 2.28, 2.44, 2.51, 2.65, 2.72, 2.79
tv[ii] := -50, -20, 0, 10, 30, 40, 50
cpv := 10^3
Prv := 0.71
vsρ := cspline(tv, ρv)
vsλ := cspline(tv, λv)
ρvx(tx) := interp(vsρ, tv, ρv, tx)
λvx(tx) := interp(vsλ, tv, λv, tx)
vsη := cspline(tv, ηv)
vsa := cspline(tv, av)
ηvx(tx) := interp(vsη, tv, ηv, tx)
avx(tx) := interp(vsa, tv, av, tx)
vsν := cspline(tv, νv)
νvx(tx) := interp(vsν, tv, νv, tx)
ρvc(tx) := ρvx(tx)
λvc(tx) := λvx(tx)*10^-2
νvc(tx) := νvx(tx)*10^-6
avc(tx) := avx(tx)*10^-6
ηvc(tx) := ηvx(tx)*10^-6
F(ν, z) := sum((z/2)^(2*m)/(Γ(m + 1)*Γ(m + ν + 1)), m = 0 .. 40)
F1(ν, z) := F(ν, z)*Γ(ν + 1)
I(ν, z) := (z/2)^ν*F(ν, z)
A(n, M, Y) := I(-n + 1, M*Y)*I(n - 1, M)
B(n, M, Y) := I(-n + 1, M)*I(n - 1, M*Y)
C(n, M, Y) := I(n, M)*I(-n + 1, M*Y)
C1(n, M, Y) := I(n, M*Y)*I(-n + 1, M)
D(n, M, Y) := I(n - 1, M*Y)*I(-n, M)
D1(n, M, Y) := I(n - 1, M)*I(-n, M*Y)
Ω(n, M, Y) := (A(n, M, Y) - B(n, M, Y))/(C(n, M, Y) - D(n, M, Y))
Ω0(n, M, Y) := -Γ(-n + 1)*(Y^(2*(1 - n)) - 1)*M/(2*Γ(-n + 2))
r1 := d1/2
Ω1(n, M) := (I(n - 1, M) - I(1 - n, M))/(I(n, M) - I(-n, M))
Rev(tx) := d1*vvv/νvc(tx)
r2 := d2/2
α2(tx) := λvc(tx)*Rev(tx)^0.681*Prv^0.33*(ss*2/(d2 - d1))^0.2*(ss*2/(δ0x + δ2x))^0.113*0.134/d1
α3(vvv) := 4 + 2.23*vvv
Nu := α*r1/λal
kk := l/r1
ll := kk/(Nu*2)
ff(n, M) := M/(1 - n)
P(n, M, Y) := Ω(n, M, Y)*M*(ll*M*ff(n, M) + 1 - n)^-1
TOL := 10^-10
R2(n, Y) := Y^(1 - n)
YY(n, R) := R^(1/(1 - n))
P1(n, M) := -l*M^2/(d1*((1 - n)^2 + ll*M^2))
PP(n, M, Y) := P(n, M, Y) + P1(n, M)
QQP2(n, M, Y) := -2*λal*π*LLL*PP(n, M, Y)
δ01(n, M) := 2*α*r1^2*(1 - n)^2/(λal*M^2)
ppx := ln(δ0x/δ2x)/ln(d2/d1)
nx := ppx/(ppx + 2)
nx = 0.410899
R2x := d2/d1
R2x = 1.83562
Yx := YY(nx, R2x)
Yx = 2.80395
Mx := (1 - nx)*sqrt(2*α*r1^2/(λal*δ0x))
nx = 0.410899
Mx = 0.142882
η(n, M, Y, R2) := -2*Ω(n, M, Y)*(1 - n)/(M*(R2^2 - 1))
Yx = 2.80395
η(nx, Mx, Yx, R2x) = 0.976402
SS := π*(r2^2 - r1^2)*LLL*2/(2.5*10^-3)
SS1 := 2*π*r1*(2.5 - 0.7)*10^-3*LLL/(2.5*10^-3)
RK(n, M, Y) := 1/QQP2(n, M, Y)
R1 := (ln(aa/(aa - δp))*λp1^-1 + ln(bb/aa)*λst^-1 + ln(r1/bb)*λal^-1)*(2*π*LLL)^-1
RQ(n, M, Y) := RK(n, M, Y) + R1
HK(n, M, Y) := 1/RK(n, M, Y)
rx(-10) = 261717
px3(-10) = 2646534
rx3(-10) = 262447
px(-10) = 2647719
vx(tx) := vLx3(tx)
vgx(tx) := vGx3(tx)
cplx(tx) := Cpx1(tx)
ηgc(tx) := μGx(tx)
ηc(tx) := μLx(tx)
RK(nx, Mx, Yx) = 0.0345331
tbl = 0
λ1(xx) := 64/xx
λ2(xx) := 0.3164/xx^0.25
λ3(yy) := (1.8*log(8.3/yy))^-2
P1(xx) := 0.5 + 0.5*erf((xx - 2850)/(600*sqrt(2)))
P2(xx, yy) := erf(xx*yy/(275*sqrt(2)))
λtot(xx, yy) := λ1(xx)*(1 - P1(xx)) + λ2(xx)*P1(xx)*(1 - P2(xx, yy)) + λ3(yy)*P1(xx)*P2(xx, yy)
AAA(tx) := d/dtx(px(tx))
ff(χ, yy) := log(100*λtot(10^χ, yy))
yn(H, U, f) := (9.81*H*vx(tbl)^-1 - δδP)*(1 + f)*cplx(tbl)/(AAA(tbl)*rx(tbl))
GG(H, U, y, f) :=
    0 if y ≤ yn(H, U, f)
    U*(y - yn(H, U, f))/(rx(tbl)*(1 - yn(H, U, f))) otherwise  # y
ffx := AAA(tbl)*rx(tbl)/((9.81*HHH0*vx(tbl)^-1)*cplx(tbl))
GT(H, U, f) := GG(H, U, 1, f)*(f + 1)
GL(H, U, y, f) :=
    GT(H, U, f) if y ≤ yn(H, U, f)
    GT(H, U, f) - GG(H, U, y, f) otherwise
ffx - 1 = 386.313
ReG(H, U, y, f) := GG(H, U, y, f)*2/(ηgc(tbl)*π*aa)
JG(H, U, y, f) := GG(H, U, y, f)/(π*aa^2)
ReL(H, U, y, f) := GL(H, U, y, f)*2/(ηc(tbl)*π*aa)
JL(H, U, y, f) := GL(H, U, y, f)/(π*aa^2)
X(H, U, y, f) := GL(H, U, y, f)/GG(H, U, y, f)*sqrt(λtot(ReL(H, U, y, f), Δ)*vx(tbl)/(λtot(ReG(H, U, y, f), Δ)*vgx(tbl)))
XX(tx, n, y) := sqrt(vx(tx)*ηc(tx)^n*(1 - y)^(2 - n)/(vgx(tx)*ηgc(tx)^n*y^(2 - n)))
CC(H, U, y, f) :=
    20 if ReG(H, U, y, f) > 2320 and ReL(H, U, y, f) > 2320
    12 if ReG(H, U, y, f) > 2320 and ReL(H, U, y, f) ≤ 2320
    10 if ReG(H, U, y, f) ≤ 2320 and ReL(H, U, y, f) > 2320
    5 otherwise
Φ2L(H, U, y, f) :=
    1 if y ≤ yn(H, U, f)
    1 + CC(H, U, y, f)/X(H, U, y, f) + 1/X(H, U, y, f)^2 otherwise
Φ2G(H, U, y, f) := 1 + CC(H, U, y, f)*X(H, U, y, f) + X(H, U, y, f)^2
PFL(H, U, y, f) := λtot(ReL(H, U, y, f), Δ)*vx(tbl)*JL(H, U, y, f)^2/(4*aa)
PFG(H, U, y, f) := λtot(ReG(H, U, y, f), Δ)*vgx(tbl)*JG(H, U, y, f)^2/(4*aa)
ΨG(H, U, y, f) := Φ2G(H, U, y, f)*U*PFG(H, U, y, f)/qtr
ΨL(H, U, y, f) := Φ2L(H, U, y, f)*U*PFL(H, U, y, f)/qtr
ΣΨG(H, U, y, f) := integral(ΨG(H, U, z, f), z = yn(H, U, f) .. y)
ΣΨL(H, U, y, f) := integral(ΨL(H, U, z, f), z = yn(H, U, f) .. y)
ΨL1(H, U, y, f) := U*PFL(H, U, y, f)/qtr
ϕL(H, U, y, f) :=
    1 if y ≤ yn(H, U, f)
    1/Φ2L(H, U, y, f)^ααα otherwise
xx(H, U, y, f) :=
    0 if y ≤ yn(H, U, f)
    (y - yn(H, U, f))/((1 + f)*(1 - yn(H, U, f))) otherwise
ϕG(H, U, y, f) := 1 - ϕL(H, U, y, f)
VG(H, U, y, f) := JG(H, U, y, f)/ϕG(H, U, y, f)*vgx(tbl)
VL(H, U, y, f) := JL(H, U, y, f)/ϕL(H, U, y, f)*vx(tbl)
ΔPu(H, U, f) := vx(tbl)^-1*VL(H, U, 1, f)^2*ϕL(H, U, 1, f) + vgx(tbl)^-1*VG(H, U, 1, f)^2*ϕG(H, U, 1, f) - vx(tbl)^-1*VL(H, U, 0, f)^2
ΔpL(L0, H, U, f) := λtot(ReL(H, U, 0, f), Δ)*L0*vx(tbl)*JL(H, U, 0, f)^2/(aa*4)
LL0(H, U, f) := H + Lpod + yn(H, U, f)*Li
ΔpX(H, U, f) := ΔpL(LL0(H, U, f), H, U, f)
ΔpG1(Lot, H, U, f) := Φ2G(H, U, 1, f)*PFG(H, U, 1, f)*Lot
ΔpL1(Lot, H, U, f) := Φ2L(H, U, 1, f)*PFL(H, U, 1, f)*Lot
ρef(H, U, f) := ϕL(H, U, 1, f)/vx(tbl) + ϕG(H, U, 1, f)/vgx(tbl)
ΔP(H, U, f) := ΣΨL(H, U, 1, f) + ΔpX(H, U, f) + ΔpL1(Lot, H, U, f) + ΔPu(H, U, f)
Hy(H, U, f) := ΔP(H, U, f)/(9.81*(vx(tbl)^-1 - ρef(H, U, f)))
ffx - 1 = 386.313
fff := root(Hy(HHH0, qtr*Li, ff0) - HHH0, ff0)  # error: Значение должно быть действительным.
fff =  # error: Эта переменная не определена.
Hy(HHH0, qtr*Li, fff) =  # error
Hy(HHH0, qtr*Li, fff) - HHH0 =  # error
ftm(tm0, H, U) := tbl - tm0 - ΔpX(H, U, fff)/AAA((tm0 + tbl)/2) + 9.81*H/(vx((tm0 + tbl)/2)*AAA((tm0 + tbl)/2))
fff =  # error
tm0 := tbl
tmx(H, U) := root(ftm(tm0, H, U), tm0)
tmm := tmx(HHH0, UUU)
tmm =  # error
tvih(H, U, f) := tbl + 9.81*H*ρef(H, U, f)/AAA(tbl)
fff =  # error
tmm1 := tbl + 9.81*HHH0/(AAA(tbl)*vx(tbl))
tmm1 = 0.245651
tmm =  # error
tmm1 = 0.245651
yynn := yn(HHH0, UUU, fff)
tav := (tbl + tmm)*0.5*yynn + (tvih(HHH0, UUU, fff) + tmm)*0.5*(1 - yynn)
tbl = 0  # температура в конденсаторе
tmm =  # error  # максимальная температура в испарителе
tav =  # error  # средняя температура в испарителе
GG(HHH0, UUU, 1, fff) =  # error  # поток газа на выходе (кг/с)
GL(HHH0, UUU, 1, fff) =  # error  # поток жидкости на выходе (кг/с)
GL(HHH0, UUU, 1, fff)/GG(HHH0, UUU, 1, fff) =  # error
GL(HHH0, UUU, 1, fff) + GG(HHH0, UUU, 1, fff) =  # error  # полный поток (кг/с)
GL(HHH0, UUU, 0, fff) =  # error  # поток жидкости на входе (кг/с)
GL(HHH0, UUU, 1, fff)*vx(tbl)*1000*3600 =  # error  # полный объем жидкости на выходе (л/час)
GL(HHH0, UUU, 0, fff)*vx(tbl)*1000*3600 =  # error  # полный объем жидкости на входе (л/час)
GG(HHH0, UUU, 1, fff)*rx(tbl) =  # error
GG(HHH0, UUU, 1, fff)*vx(tbl)*1000*3600 =  # error  # объем конденсата на выходе из конденсатора (л/час)
GG(HHH0, UUU, 1, fff)*vgx(tbl)/(GG(HHH0, UUU, 1, fff)*vgx(tbl) + GL(HHH0, UUU, 1, fff)*vx(tbl)) =  # error  # объемное газосодержание на выходе из контура
xx(HHH0, UUU, 1, fff) =  # error  # массовое газосодержание на выходе из контура
GG(HHH0, UUU, 1, fff)/(GG(HHH0, UUU, 1, fff) + GL(HHH0, UUU, 1, fff)) =  # error
fff =  # error
qtr ≡ 76.68
Li ≡ 200
tbl ≡ 0
HHH0 ≡ 2.5
ff0 ≡ 5
ϕG(HHH0, UUU, 1, fff) =  # error  # истинное газосодержание на выходе из контура
(δδP - ΔpX(HHH0, UUU, fff))/δδP*100 =  # error
δδP ≡ 0
ΔpX(HHH0, UUU, fff) =  # error
ΔP(HHH0, UUU, fff) + 9.81*Hy(HHH0, UUU, fff)*ρef(HHH0, UUU, fff) =  # error
tav =  # error  # средняя температура в испарителе
tmm =  # error  # максимальная температура в испарителе
9.81*Hy(HHH0, UUU, fff)*vx(tbl)^-1 =  # error  # давление столба жидкости (Па)
tvih(HHH0, UUU, fff) =  # error  # температура на выходе из испарителя
GL(HHH0, UUU, 1, fff) =  # error  # поток жидкости на выходе (кг/с)
UUU ≡ qtr*Li
# полный объем жидкости на выходе (л/час)
GL(HHH0, UUU, 0, fff) =  # error  # поток жидкости на входе (кг/с)
9.81*Hy(HHH0, UUU, fff)*ρef(HHH0, UUU, fff) =  # error  # давление столба смеси (Па)
GL(HHH0, UUU, 0, fff)*vx(tbl)*1000*3600 =  # error  # полный объем жидкости на входе (л/час)
GG(HHH0, UUU, 1, fff) =  # error  # поток газа на выходе (кг/с)
GG(HHH0, UUU, 1, fff)*vx(tbl)*1000*3600 =  # error  # объем конденсата на входе в малый контур (л/час)
ΔP(HHH0, UUU, fff) =  # error  # перепад давления в контуре (Па)
# массовое газосодержание на выходе из контура
# истинное газосодержание на выходе из контура
ΔP(HHH0, UUU, fff) - ΔpX(HHH0, UUU, fff) =  # error  # трение на учстке кипения и в отводных трубах
kkkkk(H, U, f, Lot1) := [
    tav;
    tmm;
    tvih(HHH0, UUU, fff);
    (GL(H, U, 1, f)*vx(tbl)*1000*3600);
    (GL(H, U, 0, f)*vx(tbl)*1000*3600);
    (GG(H, U, 1, f)*vx(tbl)*1000*3600);
    xx(H, U, 1, f);
    ϕG(H, U, 1, f);
    (ΔP(H, U, f)*10^-3);
    (ΣΨL(H, U, 1, f)*10^-3);
    (ΔpX(H, U, f)*10^-3);
    ΔpL1(Lot1, H, U, f);
    ΔPu(H, U, f);
    VG(H, U, 1, f);
    VL(H, U, 1, f);
    VL(H, U, 0, f);
    UUU;
    fff;
    yynn;
    (10^4*RVN0);
    (10^4*RVN);
    (RVN0/RVN)
]
kkkkk(HHH0, UUU, fff, Lot) =  # error
ΔP(HHH0, UUU, fff) =  # error  # перепад давления в контуре (Па)
ΣΨL(HHH0, UUU, 1, fff) =  # error
полное падение давления за счет трения на участке, на котором происходит фазовый переход
ΔpX(HHH0, UUU, fff) =  # error  # трение на участке до точки нагрева
ΔpX(HHH0, UUU, fff) =  # error  # трение на участке до точки нагрева
ΔpL1(Lot, HHH0, UUU, fff) =  # error
перепад давления на преодоление трения в отводных трубах
RVN0 := 0.5*(9.81*Hy(HHH0, UUU, fff)*vx(tbl)^-1)/(UUU*AAA(tbl))
ΔPu(HHH0, UUU, fff) =  # error
# давление ускорения
ΔPu(HHH0, UUU, fff) =  # error  # давление ускорения
RVN := (tav - tbl)/UUU
VG(HHH0, UUU, 1, fff) =  # error  # скорость газа на выходе из контура (м/с)
# скорость жидкости на выходе из контура (м/с)
VG(HHH0, UUU, 1, fff) =  # error  # скорость газа на выходе из контура (м/с)
VL(HHH0, UUU, 0, fff) =  # error  # скорость жидкости на входе в контур (м/с)
UUU = 15336
VL(HHH0, UUU, 1, fff) =  # error  # скорость жидкости на выходе из контура (м/с)
δδP/ΔP(HHH0, UUU, fff)*100 =  # error
yynn =  # error
VL(HHH0, UUU, 0, fff) =  # error  # скорость жидкости на входе в контур (м/с)
RVN0 =  # error
RVN =  # error
9.81*Hy(HHH0, UUU, fff)*vx(tbl)^-1 =  # error  # давление столба жидкости (Па)
RVN0/RVN =  # error
9.81*Hy(HHH0, UUU, fff)*ρef(HHH0, UUU, fff) =  # error  # давление столба смеси (Па)
fff =  # error
RVN := (tav - tbl)/UUU
yynn =  # error
RV1 := 0.5*9.81*HHH0/(AAA(tbl)*vx(tbl)*UUU)
RV1 = 8.00897e-6
RVN =  # error
RV1/RVN =  # error
